# https://de.wikipedia.org/wiki/Widerstandsmoment
# https://link.springer.com/chapter/10.1007/978-3-8348-9199-0_11
# https://www.maschinenbau-wissen.de/skript3/mechanik/festigkeitslehre/136-torsion
# https://de.wikipedia.org/wiki/Schubmodul
# Torsion Solarpaneel-Reling: (nur für Rechteckquerschnitt Berechnet)
# Allgemeine Formeln:
# Mt.....Torsionsmoment
# F.....Kraft
# r.....Hebelarm
# φ.....Verdrehwinkel
# T.....Torsionsmoment
# l.....länge
# G.....Schubmodul
# IT.....Torsionsträgheitsmoment
# W.....Widerstandmoment
# Mt=F x r  [Nm]
# φ=T x l/G x IT  [rad]
# τT=MT/W
# Angabe:
F_H := 196.2 N  # Haltekraft
F_G := 10.5 kg  # Eigengewicht Solarpaneel
r := 0.180 m
b := 0.68 m
h := 0.035 m
# Berechnung:
M_T := F_H*r = 35.316 J
W := b*h^2/6 = 0.138833 L
τ_T := M_T/W = 0.254377 N/mm^2
# Torsion am Solarpaneel auf der Reling ist sehr gering -> stellt kein Problem dar
# https://www.bauformeln.de/statik/torsionsschubspannung/winkelprofil/
# Torsion Solarpanel Reling: (für Quaderform berechnet)
L := 1.5 m
b := 0.68 m
h := 0.035 m
a := 0.18 m
F_Dy := 69.459 N
M_t := a*F_Dy = 12.5026 J
# a.....Abstand von Fixierpunkt auf Kraft
#
# E.....Elastizitätsmodul Alu (Alurahmen)
#
# ν.....Poissonzahl
#
# G.....Schubmodul
#
# It.....Torsionsträgheitsmoment
#
# L.....Länge Solarpaneel
#
# θ.....Verdrehwinkel
#
# FDy.....Y-Komponente Dämpferkraft
E := 70000 Pa
ν := 0.34
G := E/(2*(1 + ν)) = 26119.4 Pa
I_t := a^2*π/2 = 0.0508938 m^2
θ := M_t*L/(G*I_t) = 0.014108 m^2
W := b*h^2/6 = 138.833 cm^3
τ := M_t/W = 0.0900549 N/mm^2
φ := M_t*L/(W*a*G) = 28.7318 rad
τ_t := M_t*a/I_t = 44.219 N
