# https://blog.federnshop.com/schenkelfedern-torsionsfedern/
# https://webshop.alcomex.de/schenkelfeder-edelstahl-o-3-00x26-00x15-75-mm-tor2130r
# https://www.hennlich.at/uploads/e_SchenkelfedernDrehfedern2016_Gesamtkapitel.pdf
# https://www.knoerzer.eu/fileadmin/user_upload/user_upload/FK_Kat-Web_20191120_Lay_01.pdf
# Schenkelfeder: (180° Ausgangswinkel)
# Fn.....höchste erreichbare Federkraft
# Mn.....maximales Drehmoment
# RH.....Hebelarm
# Fx.....erreichbare kraft bei
# αx.....vorgegebenen Drehwinkel
# αn.....maximaler Drehwinkel
# c.....Federkonstante Moment pro Grad Drehwinkel
# σ.....Biegespannung
# Allgemeine Formeln
# Fn=Mn/RH
# Fx=Fn/αn*αx
# Angabe:
Mn1 := 2.914 J
αn := 90°
d := 3 mm
RH := 0.055 m
αx := 55°
Mn2 := 2914 J
# Berechnung:
Fn := Mn1/RH = 52.9818 N
Fx := Fn/αn*αx = 32.3778 N
σ := 32/π*Mn2/d^3 = 1099324 N/mm^2
# 1. Anmerkung:
# Vorhin berechnet maximale kraft von Wind senkrecht auf solar ist 7,676kg -> 75,301N bedeutet, wenn der Wind auf die Fläche trifft bleibt das Solarpaneel nicht offen. Maximale Federkraft ist nämlich nur 52,982N. (ohne Berücksichtigung von den Gegengewichten)
# 2. Anmerkung:
# Bei einem Hebelarm (RH) von 0,037m würde eine maximale Federkraft von 78,757 N auftreten, bedeutet, dass das Solarpaneel offen bleiben würde. (ohne Berücksichtigung von dem Gegengewicht)
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# Mit Gegengewichten:
m_gg := 20.72 kg
m_g := 15.323 kg
b := 0.0095 m
F_W := 75.301 N
F_n := 52.982 N
a := 0.42 m
# Berechnung:
F_g := m_g*g = 150.267 N
F_gg := m_gg*g = 203.194 N
ΣFx := F_W - F_n = 22.319 N
ΣFy := F_g + F_gg = 353.461 N
ΣM := ΣFx*a - ΣFy*b = 6.0161 J
# 3. Anmerkung:
# Bei einem Wind von 18kn bleibt das Solarpaneel nicht offen. Es wirkt noch ein Moment von 6,016 J -> 6,016 Nm
