# https://www.schmid-federn.de/de/wissen/schenkelfederwissen.html
# https://webshop.alcomex.de/schenkelfedern-berechnen
# https://www.biegex-federn.de/produkte/torsionsfedern.html#:~:text=Doppeltgewundene%20Torsionsfedern&text=Zur%20Berechnung%20der%20h%C3%B6chsten%20Federkraft,FN%20%3D%20MN%2FR).
# https://blog.federnshop.com/federkraft-berechnen/
# https://www.federnshop.com/de/berechnung/schenkelfedern.html
# https://www.maschinenmarkt.vogel.de/so-berechnen-sie-eine-stahlfeder-a-882119/
# Feder-Berechnung:
# Angabe:
Mn1 := 1 N*m
αn := 90°
d := 3 mm
RH := 0.055 m
αx := 55°
φ := 0.611 rad
M := 1 N*m
c_t := M/φ = 1.63666 N*m
δ := 1/c_t = 0.611 1/J
Sb := 1*1000 N*mm/(2.651 mm^3) = 377.216 N/mm^2
