# https://www.schweizer-fn.de/maschinenelemente/schraube/schraubenverbindung.php#berechnung
# https://www.lehrerfreund.de/technik/1s/verbindungstechnik-schraubverbindungen-2/4224
# Klemmkraft Teleskopauszug Reling: (Metrisches ISO Gewinde)
# Allgemeine Formel:
# 10.9 Festigkeitsklasse  Re= 900N/mm²  Rm=1000N/mm²
# Angabe:
R_e := 900 N/mm^2
ν := 2.5
M_K := 360 N/m
d := 0.64 m
n := 1
φ := 2
μ := 0.2
# Berechnung 1:
# FB.....Betriebskraft
# Fverf.....Erforderliche Vorspannkraft
# σzul.....Zulässige Spannung
# ν.....Sicherheitsfaktor
# MK.....Kupplungsmoment
# φ.....Rutschsicherheit
# μ.....Reibungszahl
σ_zul := R_e/ν = 360 N/mm^2
F_B := M_K/(n*d/2) = 1125 Pa
F_verf := φ*F_B/μ = 11250 Pa  # Tabellenbuch Metall S.220
# -----------------------------------------------------------------------------------------------
# https://www.bossard.com/at-de/assembly-technology-expert/technische-informationen-und-tools/online-konverter-und-rechner/drehmoment-und-vorspannkraft-berechnen/
# Berechnung 2:
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