# Schraubenberechnung:
# Festigkeitsklasse: 8.8 | Schraube: M10
# Angaben:
F := 230 N
z := 4  # Schraubenanzahl
l_W := 60 mm  # Hebellänge
l_K := 60 mm  # Klemmlänge
n := 0.4
α_A := 1.80
E_S := 2.0*10^5 N/mm^2  # E-Modul Schraube
E_B := 1.8*10^5 N/mm^2  # E-Modul Befestigung (Edelstahl-Platte)
R_p0.2 := 640 N/mm^2
R_m := 800 N/mm^2
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# Skizze:
# Berechnung:
M_b := F*l_W = 13.8 N*m
# M10 -> Schrauben
ν := 0.6  # angenommen Böge: I80
μ_1 := 0.1  # Reibung: Stahl-Stahl
A_Serf := α_A*F/(ν*R_p0.2) = 1.07812 mm^2  # Erforderlicher Spannungsquerschnitt
# M10:
d := 10 mm
d_2 := 9.026 mm
l_K := 60 mm
W_ps := 124.6 mm^3
d_w := 14.6 mm
l := 70 mm
b := 26 mm
d_h := 10.5 mm
A_p := 131.95 mm^2
A_s := 58 mm^2
A := 78.54 mm^2
# Klemmkraft:
z*F_Kerf*μ ≥ F
F_Kerf ≥ F/(μ*z)
F_Kerf := F/(μ_1*z) = 575 N
F_Kerf = 575 N
# Ersatzfläche:
A_ers := π/4*(d_w^2 - d_h^2) + π/8*d_w*l_K*((nthroot(l_K*d_w/(l_K + d_w)^2, 3) + 1)^2 - 1)
A_ers = 552.594 mm^2
# Nachgiebigkeit -> Schraube:
l_1 := l - b = 44 mm
l_2 := l_K - l_1 = 16 mm
δ_S := (l_1/A + (l_2 + 0.8*d)/A_s)/E_S
δ_S = 4.87009e-6 mm/N
# Nachgiebigkeit -> Flansch:
δ_P := l_K/(A_ers*E_B)
δ_P = 6.03216e-7 mm/N
# Kräfteverhältnis:
ϕ := δ_P/(δ_P + δ_S) = 0.110211
ϕ_n := n*ϕ = 0.0440842
# Setzkraft:
l_K/d = 6
# (nach 7.6.5.7 im Böge)
f_Z := 0.006 mm
F_Z := ϕ/δ_P*f_Z
F_Z = 1.09623 kN
# Montagevorspannkraft:
F_VM := α_A*(F_Z + F_Kerf)
F_VM = 3.00821 kN
# Axiale Betriebskraft:
h := 50 mm
l_3 := 60 mm
F*l_H == 2*F_A1*l_3
F_A := F*l_W/(2*l_3)
F_A = 115 N
# Schraubenkraft:
F_S := F_VM + n*ϕ*F_A
F_S = 3.01328 kN
# Kräftevergleich:
F_0.2 := A_s*R_p0.2 = 37.12 kN
F_S < F_0.2  # -> erfüllt
# Anziehdrehmoment:
ρ := 9 deg
μ_2 := 0.16
M_A := F_VM*(d_2/2*tan(α + ρ) + μ_2*0.7*d)
M_A = 5.62111 N*m
# Montagevorspannung:
σ_VM := F_VM/A_s
σ_VM = 51.8658 N/mm^2
# Torsionsspannung:
τ_t := F_VM*d_2*tan(α + ρ)/(2*W_ps)
τ_t = 18.0731 N/mm^2
# Vergleichsspannung:
σ_V := sqrt(σ_VM^2 + 3*τ_t^2)
σ_V = 60.5803 N/mm^2
R_p0.2*0.9 = 576 N/mm^2
σ_V < 0.9*R_p0.2  # -> erfüllt
# Ausschlagkraft:
F_SA := n*ϕ*F_A
F_SA = 5.06969 N
F_a := F_SA/2
F_a = 2.53484 N
# Ausschlagspannung:
σ_a := F_a/A_s = 0.0437042 N/mm^2
σ_A == 50*N/mm^2  # -> Böge (Festigkeitsklasse)
σ_a < σ_A  # -> erfüllt
# Flächenpressung:
p := F_S/A_p = 22.8366 N/mm^2
p_G := 500 N/mm^2  # .....Für E335
p < p_G  # ->erfüllt
