# https://de.wikihow.com/Windlast-berechnen#:~:text=Die%20allgemeine%20Formel%20f%C3%BCr%20Windlast,mit%20bekannter%20Fl%C3%A4che%20zu%20berechnen.
# Windkraft auf Solar Davits
# Allgemeine Formeln | F.....Windlast
# F=A*P*Cd  P=0,00256*v² | A.....Fläche Solarpanel [ft²]
# P.....Winddruck [P/Sf]
# Cd.....Luftwiderstandsbeiwert [-]
# Angabe:
# Windgeschwindigkeit durchschnitt 18 Knoten
A := 10.979 ft^2
v := 20.741 mph
Cd := 1.4
# Berechnung:
P := 0.00256*20.741^2 = 1.10128
F := 10.979*1.101*1.4 = 16.923  # lbs  # 16,923 lbs = 7,676 kg
# 7,676 kg wirken auf das Solarpaneel bei frontaler Anströmung des Windes im durchschnitt in der Adria bei 18 Knoten Wind.
# https://de.wikipedia.org/wiki/Winddruck
# Windkraft auf Solarpaneel Davits:
# Angabe:
A_Ges. := 1.02 m^2
v := 9.271 m/s
c_u := 9.271 m/s
ρ := 1.204 kg/m^3  # bei 20°C
c := 7 m/s
# Berechnung:
# cp.....Druckbeiwert [-]
# WD.....Winddruck [N/m²]
# w.....Windlast [N]
# ρ.....Dichte [kg/m³]
# cu/v.....Anströmgeschwindigkeit
# c.....angenommene geschw. nach kontakt
c_p := 1 - (c/c_u)^2 = 0.429911
W_D := c_p*ρ/2*v^2 = 22.2448 N/m^2
# Bei Durchschnittsgeschwindigkeit in der Adria 18kn -> 9,271m/s
w := A_Ges.*W_D = 22.6897 N
# 2,313 kg wirken auf das Solarpaneel bei frontaler Anströmung des Windes im durchschnitt in der Adria bei 18 Knoten Wind.
