F_Sx := 1 N
# Abscherung & Biegespannung am Bolzen der Absteifstange:
# Angabe:
d := 6 mm
F_w := 6.637 N
a := 2050 mm
r := 3 mm
b := 2912.26 mm
# Skizze:
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# Berechnung:
ΣM_B := F_w*b + F_Sx*a
F_Sx := F_w*b/a = 9.42862 N
F_S := F_Sx/sin(55°) = 11.5102 N
τ_a := F_S/(r^2*π) = 0.407091 N/mm^2
M_t := F_S*r = 34.5307 N*mm
# genauer nachlesen Böge S. D23 / D72
W := π/16*d^3 = 42.4115 mm^3
τ_t := M_t/W = 0.814181 N/mm^2
M_b := τ_t*W = 34.5307 N*mm
σ_B := M_b/W = 0.814181 N/mm^2
# ist falsch, weil Mb müsste null sein -> siehe skizze
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