# https://de.wikipedia.org/wiki/Profilwiderstand
# cw-Wert Berechnung:
#
# Angabe:
v := 9.271 m/s
A := 1.02 m^2
ρ := 1.204 kg/m^3
F_p := 52.778 N
c_W := 2
# Berechnung:
F_W := c_W*A*ρ/2*v^2 = 105.555 N
c_W := F_W/(ρ/2*v^2*A) = 2
