# Berechnung der Gegengewichten und der Feder
# m ... Masse
m := 15.33 kg  # Fg ...Gewichtskraft
F_g := g*m = 150.336 N
a := 328.5 mm
s := 706.4 mm
x := s - a
x = 377.9 mm
M := F_g*x
M = 56812 N*mm
M_F := 2914 N*mm
M_4F := M_F*4
M_4F = 11656 N*mm
M_ohne := M - M_4F
M_ohne = 45156 N*mm
l_durch := 250 mm
F_gneu := M_ohne/l_durch
F_gneu = 180.624 N
m_neu := F_gneu/g
m_neu = 18.4185 kg
