# Haltekraft des Solarpaneel
l_1 := 590 mm
l_2 := 250 mm
l_3 := 180 mm
F_g := 105 N
# Fg ... Gewichtskraft
# FD ... Dämpferkraft
# FH ... Haltekraft
F_D := 200*2 N
α := 10°
F_Dy := sin(α)*F_D = 69.4593 N
F_Dx := cos(α)*F_D = 393.923 N
ΣF_x == -F_Dy + F_Ax
ΣF_y == -F_H - F_G + F_Dy + F_Ay
ΣM_A == F_H*l_1 + F_g*l_2 - F_Dy*l_3
F_H := (F_g*l_2 - F_Dy*l_3)/l_1
F_H = 23.3006 N
# Ziehkraft um das Solarpaneel zu schließen
l_1 := 590 mm
l_2 := 250 mm
l_3 := 180 mm
l_4 := 90 mm
# Fg ... Gewichtskraft
# FD ... Dämpferkraft
# FH ... Haltekraft
F_g := 105 N
F_D := 200 N
α := 10°
F_Dy := cos(α)*F_D = 196.962 N
F_Dx := sin(α)*F_D = 34.7296 N
ΣF_x == F_Hx - F_Dx + F_Ax
ΣF_y == -F_Hy - F_G + F_Dy + F_Ay
ΣM_A == F_Hy*l_1 + F_g*l_2 - F_Dy*l_3
F_Hy := (F_g*l_2 - F_Dy*l_3)/l_1
F_Hy = -15.5984 N
ΣM_B == F_Hy*(l_1 + l_4) + F_g*(l_2 + l_4) - F_Dy*(l_3 + l_4) - F_Ay*l_4
F_Ay := (-F_Hy*(l_1 + l_4) - F_g*(l_2 + l_4) + F_Dy*(l_3 + l_4))/l_4
F_Ay = 312.073 N
F_H := F_Hy/cos(45°)
F_H = -22.0595 N
F_Hx := F_Hy
F_Ax := F_Hx - F_Dx
F_Ax = -50.3281 N
