# Berechnung
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# Angegeben Daten Solarpaneel:
# Durchschnittlicher Tages Ertrag im Sommer : 760Wh
# Nennleistung: 190Wp
# Spannung: 20.13V
# Strom: 9.44A
# Angaben zur Batterie:
# 1050Ah Gesamtes Speichervolumen von verwendbar: 860Ah
# Benötigte Spannung zum Laden:
# im Schnitt 13V-14V --> 13.5V
# Wahre Werte zum Rechnen (Ausgabe Solarpaneel):
# Leistung: 140W
# Spannung: 18.4V
# Strom: 7.6A
# Kabellänge:
# Solarpaneel auf Davits /Laderegler: 5m
I := 7.6 A
L := 5 m
u := 2%
U := 18.4 V
K := 56*m/(Ω*mm^2)
2*I*L/(K*u*U) = 3.68789 mm^2  # --> Aufrunden auf 4mm²
# Kabellänge:
# Laderegler-Sicherung/Verteiler: 0.3m
I := 10.37 A
L := 0.3 m
u := 2%
U := 13.5 V
K := 56*m/(Ω*mm^2)
2*I*L/(K*u*U) = 0.411508 mm^2  # --> Aufrunden auf 2.5mm²
# Kabellänge:
# Sicherung/Verteiler-Batterie: 5m
I := 10.37*2 A + 37 A  # x2 Wegen beide Solarpaneele + bereits vorhandene Solarpaneele
L := 5 m
u := 2%
U := 13.5 V
K := 56*m/(Ω*mm^2)
2*I*L/(K*u*U) = 38.1878 mm^2  # --> Aufrunden auf 50mm²
# Kabellänge:
# Solarpaneel auf Reling /Laderegler: 5m
I := 7.6 A
L := 8 m
u := 2%
U := 18.4 V
K := 56*m/(Ω*mm^2)
2*I*L/(K*u*U) = 5.90062 mm^2  # --> Aufrunden auf 6mm²
